// COMSOL Multiphysics 6.2.0.415 model "Comsol_base_file_forward.pnas.2306182121.mph"
// Outline of the model tree

Parameters
  l1 = 2000[um]
  w_main = 200[um]
  gap = 75[um]  // g_y
  a = 20  // Alpha
  w_a = (w_main-gap)/2
  l_a = w_a/tan(a/2*pi/180)
  v_in = 2.5 [m/s]  // velocity
  t_rec = pi/omega
  t_div = t_rec/100
  l_main = l_a+pitch*(n-1)
  f = 2.5[um]
  n = 10  // N
  pitch = l_a*2+p_x*2
  p_x = 50[um]  // p_x
  fr = 10[Hz]  // Frequency
  omega = 2*pi*fr

Functions
  wv1: Wave "波形 1" | period = 2*pi/omega; freq = omega

Geometry
  geom1 "ジオメトリ 1" (2D, length unit µm)
    r1: Rectangle "矩形 1" | pos = {-l1, -w_main/2}; size = {l1, w_main}
    r2: Rectangle "矩形 2" | pos = {0, -w_main/2}; size = {l_main, w_main}
    pol1: Polygon "ポリゴン 1" | source = table; table = {{0, w_main/2}, {l_a, w_main/2}, {l_a, w_main/2-w_a}}
    pol2: Polygon "ポリゴン 2" | source = table; table = {{l_a+p_x, 0}, {l_a+l_a+p_x, 0}, {l_a+l_a+p_x, w_a}}
    arr1: Array "配列 1" | input = pol1; size = {n, 1}; fullsize = {n, 1}; displ = {pitch, 0}
    arr2: Array "配列 2" | input = pol2; size = {n-1, 1}; fullsize = {n-1, 1}; displ = {pitch, 0}
    r3: Rectangle "矩形 3" | pos = {l_main, -w_main/2}; size = {l1, w_main}
    r4: Rectangle "矩形 4" | pos = {-l1, -w_main/2}; size = {l1*2+l_main, w_main/2}
    dif1: Difference "差 1" | input = r2; input2 = arr1, arr2
    uni1: Union "和 1" | input = dif1, r1, r3; intbnd = off; edge = all
    dif2: Difference "差 2" | input = uni1; input2 = r4; intbnd = off; edge = all
    fil1: Fillet "フィレット 1"
      point = dif2(1) points 4, 8, 10, 14, 16, 20, 22, 26, 28, 32, 34, 38, 40, 44, 46, 50, 52, 56, 58
      radius = f
    fin: Finalize "一体化"

Materials
  mat1: Common "Water, liquid" on all domains
    def "Basic"
      thermalexpansioncoefficient = alpha_p(T)
      bulkviscosity = muB(T)
      dynamicviscosity = eta(T)
      ratioofspecificheat = gamma_w(T)
      electricconductivity = 5.5e-6[S/m]
      heatcapacity = Cp(T)
      density = rho(T)
      thermalconductivity = k(T)
      soundspeed = cs(T)
      eta: Piecewise
        arg = T
        pieces = 
          {273.15, 413.15, 1.3799566804-0.021224019151*T^1+1.3604562827E-4*T^2-4.6454090319E-7*T^3+8.9042735735E-10*T^4-9.0790692686E-13*T^5+3.8457331488E-16*T^6}
          {413.15, 553.75, 0.00401235783-2.10746715E-5*T^1+3.85772275E-8*T^2-2.39730284E-11*T^3}
        argunit = K
        fununit = Pa*s
      Cp: Piecewise | arg = T; pieces = {273.15, 553.75, 12010.1471-80.4072879*T^1+0.309866854*T^2-5.38186884E-4*T^3+3.62536437E-7*T^4}; argunit = K; fununit = J/(kg*K)
      rho: Piecewise
        arg = T
        smooth = contd1
        pieces = 
          {273.15, 293.15, 6.3092789034e-05*T^3-0.0603676398829*T^2+18.9229382407066*T-950.704055329848}
          {293.15, 373.15, 1.0335053319e-05*T^3-0.0133950656345*T^2+4.96928883266*T+432.257114008512}
        argunit = K
        fununit = kg/m^3
      k: Piecewise | arg = T; pieces = {273.15, 553.75, -0.869083936+0.00894880345*T^1-1.58366345E-5*T^2+7.97543259E-9*T^3}; argunit = K; fununit = W/(m*K)
      cs: Interpolation | table = {{273, 1403}, {278, 1427}, {283, 1447}, {293, 1481}, {303, 1507}, {313, 1526}, {323, 1541}, {333, 1552}, {343, 1555}, {353, 1555}, {363, 1550}, {373, 1543}}; interp = piecewisecubic; fununit = m/s; argunit = K
      an1: Analytic | funcname = alpha_p; expr = -1/rho(T)*d(rho(T),T); args = T; fununit = 1/K; argunit = K
      an2: Analytic | funcname = gamma_w; expr = 1+(T/Cp(T))*(alpha_p(T)*cs(T))^2; args = T; fununit = 1; argunit = K
      an3: Analytic | funcname = muB; expr = 2.79*eta(T); args = T; fununit = Pa*s; argunit = K

Physics
  spf: LaminarFlow "層流" on all domains
    dependent variable u = {u, v, w}
    fp1: FluidProperties "流体特性 1" (default)
    init1: init "初期値 1" (default)
    wallbc1: WallBC "壁 1" (default)
    inl1: InletBoundary "流入口 1" on boundaries 1, 61 | BoundaryCondition = Velocity; U0in = v_in*wv1(t); p0 = step1(t)*p1
    out1: OutletBoundary "流出口 1" on boundaries 61
    sym1: Symmetry "対称性 1" on boundaries 2, 9, 15, 21, 27, 33, 39, 45, 51, 57

Mesh
  mesh1 "メッシュ 1" (physics-controlled)
    size: MeshSizeDefault "サイズ" | table = cfd

Studies
  std1 "スタディ 1"
    param: Parametric "パラメトリックスイープ"
      sweeptype = filled
      pname = {v_in, gap, a, fr, n, p_x}
      plistarr = {2.5, 50, 20, 10, 10, 50}
      punit = {m/s, um, , Hz, , um}
    time: Transient "時間依存" | tlist = range(0,t_div,t_rec); usertol = on; rtol = 0.025

Solver configurations
  sol1 "解 1" (study std1)
    v1: Variables "従属変数 1"
    t1: Time "時間依存ソルバー 1"
      tlist = range(0,t_div,t_rec)
      rtol = 0.025
      atolglobalfactor = 0.05
      atolmethod = {comp1_p, scaled, comp1_u, global}
      atolvaluemethod = {comp1_p, factor, comp1_u, factor}
      atolfactor = {comp1_p, 1, comp1_u, 0.1}
      initialstepbdf = 0.000001
      maxorder = 2
      bwinitstepfrac = 0.01
      estrat = exclude
      rhoinf = 0.5
      predictor = constant
      fc1: FullyCoupled "強連成 1"
        linsolver = d1
        maxiter = 8
        ntolfact = 0.5
        damp = 0.9
        jtech = once
        stabacc = aacc
        aaccdim = 5
        aaccmix = 0.9
        aaccdelay = 1
      d1: Direct "直接, 流体流れ変数 (spf)" | linsolver = pardiso; pivotperturb = 1.0E-13
  sol3 "パラメトリック解 2" (study std1)

Datasets
  dset2: Solution | solution = sol3

Evaluation groups
  eg1: EvaluationGroup "評価グループ 1"
    av1: AvLine "線平均 1" on boundaries 1 | data = dset2; expr = p

Plots
  pg1: PlotGroup2D "速度 (spf)" | data = dset2
    surf1: Surface "サーフェス" (disabled) | expr = spf.U
    str1: Streamline "流線 1" on boundaries 1 | expr = {u, v}; udist = 0.00075; arrowdistr = equaltime
      col1: Color "カラー数式 1" | expr = spf.U; descr = Velocity magnitude

Exports
  img1: Image "画像 1" | size = manualweb; unit = px; width = 640; height = 480
  anim1: Animation "アニメーション 1"
    type = imageseq
    allarray = {1, 2, 3, 4, 5, 6, 7, 8, 9, 10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}
    framesel = all
    maxframes = 10
    width = 2400